// SBML level 2 version 4

model nameless()

  // Compartments:
  compartment V_B; V_B has _mL; V_B is "Blood volume";
  compartment V_L; V_L has _mL; V_L is "Liver volume";
  compartment V_S; V_S has _mL; V_S is "Spleen volume";
  compartment V_T; V_T has _mL; V_T is "Tumor colume";
  compartment V_K; V_K has _mL; V_K is "Kidneys volume";
  compartment V_U; V_U has _mL; V_U is "Lungs volume";
  compartment V_R; V_R has _mL; V_R is "Rest of body (ROB) volume";
  compartment V_P; V_P has _mL; V_P is "Volume of blood plasma";

  // Species:
  species D_B in V_B = 0; D_B is "Free drug in blood";  // substance in _ug
  species D_L in V_L = 0; D_L is "Free drug in liver";  // substance in _ug
  species D_S in V_S = 0; D_S is "Free drug in spleen";  // substance in _ug
  species D_T in V_T = 0; D_T is "Free drug in tumor";  // substance in _ug
  species D_K in V_K = 0; D_K is "Free drug in kidneys";  // substance in _ug
  species D_U in V_U = 0; D_U is "Free drug in lungs";  // substance in _ug
  species D_R in V_R = 0; D_R is "Free drug in ROB";  // substance in _ug
  species NP_B in V_B = 0; NP_B is "Nanoparticles in blood";  // substance in _ug
  species NP_L in V_L = 0; NP_L is "Nanoparticles in liver";  // substance in _ug
  species NP_S in V_S = 0; NP_S is "Nanoparticles in spleen";  // substance in _ug
  species NP_T in V_T = 0; NP_T is "Nanoparticles in tumor";  // substance in _ug
  species NP_K in V_K = 0; NP_K is "Nanoparticles in kidneys";  // substance in _ug
  species NP_U in V_U = 0; NP_U is "Nanoparticles in lungs";  // substance in _ug
  species NP_R in V_R = 0; NP_R is "Nanoparticles in ROB";  // substance in _ug

  // Parameters:
  // average tissues density
  rho_avg has __mL_g;
  response = 0 _dimensionless;
  dose_D_ug has _ug__mL;
  D_P has _ug__mL;
  PS_L has _mL__h;
  PS_S has _mL__h;
  PS_T has _mL__h;
  PS_K has _mL__h;
  PS_U has _mL__h;
  PS_R has _mL__h;
  w_R has _dimensionless;
  w_R_061 has _dimensionless;
  Q_T has _mL__h;
  dose_NP_ug has _ug__mL;
  NP_P has _ug__mL;
  v has _dimensionless;
  vrel has __h;
  D_all_in_NP has _dimensionless;
  NP_L_aver has _ug__mL;
  NP_S_aver has _ug__mL;
  NP_T_aver has _ug__mL;
  NP_K_aver has _ug__mL;
  NP_U_aver has _ug__mL;
  NP_L_log has _dimensionless;
  NP_S_log has _dimensionless;
  NP_T_log has _dimensionless;
  NP_K_log has _dimensionless;
  NP_U_log has _dimensionless;
  NP_P_log has _dimensionless;
  NP_L_cap has _ug__mL;
  NP_S_cap has _ug__mL;
  NP_T_cap has _ug__mL;
  NP_K_cap has _ug__mL;
  NP_U_cap has _ug__mL;
  NP_L_tissue has _ug__mL;
  NP_S_tissue has _ug__mL;
  NP_T_tissue has _ug__mL;
  NP_K_tissue has _ug__mL;
  NP_U_tissue has _ug__mL;
  D_L_free has _ug__mL;
  D_S_free has _ug__mL;
  D_T_free has _ug__mL;
  D_K_free has _ug__mL;
  D_U_free has _ug__mL;
  D_L_aver0 has _ug__mL;
  D_S_aver0 has _ug__mL;
  D_T_aver0 has _ug__mL;
  D_K_aver0 has _ug__mL;
  D_U_aver0 has _ug__mL;
  D_P_aver0 has _ug__mL;
  D_L_aver has _ug__mL;
  D_S_aver has _ug__mL;
  D_T_aver has _ug__mL;
  D_K_aver has _ug__mL;
  D_U_aver has _ug__mL;
  D_P_aver has _ug__mL;
  D_L_log has _dimensionless;
  D_S_log has _dimensionless;
  D_T_log has _dimensionless;
  D_K_log has _dimensionless;
  D_U_log has _dimensionless;
  D_P_log has _dimensionless;
  D_P_log_free has _dimensionless;
  v_ir has __h;
  // Animal weight
  W_animal_061 = 20.8 _g;
  // Tumor weight (reference value)
  W_T_061 = 0.366 _g;
  // Liver to whole animal weight ratio (reference value)
  w_L_061 = 0.0538 _dimensionless;
  // Spleen to whole animal weight ratio (reference value)
  w_S_061 = 0.00601 _dimensionless;
  // Kidney to whole animal weight ratio (reference value)
  w_K_061 = 0.0142 _dimensionless;
  // Lungs to whole animal weight ratio (reference value)
  w_U_061 = 0.00679 _dimensionless;
  // Blood to whole animal weight ratio
  w_B_061 = 0.0814 _dimensionless;
  // "Burst" coefficient for release
  delta = 0.0075 _dimensionless;
  // Diffusion coefficient for release
  kdiff = 0.00549 _kdiffUnits;
  // Concentration-time coefficient for release
  gamma = 0.57 _dimensionless;
  // Animal weight
  W_animal = 20.8 _g;
  // Tumor weight
  W_T = 0.366 _g;
  // Liver to whole animal weight ratio
  w_L = 0.0538 _dimensionless;
  // Spleen to whole animal weight ratio
  w_S = 0.00601 _dimensionless;
  // Kidney to whole animal weight ratio
  w_K = 0.0142 _dimensionless;
  // Lungs to whole animal weight ratio
  w_U = 0.00679 _dimensionless;
  // Diffusion coefficient for kidney
  PS_K_061 = 0.000927 _mL__h;
  // Diffusion coefficient for liver
  PS_L_061 = 0.0214 _mL__h;
  // Diffusion coefficient for rest of body
  PS_R_061 = 0.0579 _mL__h;
  // Diffusion coefficient for spleen
  PS_S_061 = 0.00202 _mL__h;
  // Diffusion coefficient for tumor
  PS_T_061 = 0.00131 _mL__h;
  // Diffusion coefficient for lungs
  PS_U_061 = 0.000122 _mL__h;
  // selected based on experimental conditions, per body weight
  dose_D_ug_g = 2.5 _ug__g;
  w_B = 0.0814 _dimensionless;
  // Blood flux through liver
  Q_L = 181.92 _mL__h;
  // Blood flux through spleen
  Q_S = 14.88 _mL__h;
  // Blood flux through kidney
  Q_K = 124.6 _mL__h;
  // Blood flux through lungs
  Q_U = 678 _mL__h;
  // Blood flux through rest of body
  Q_R = 371.48 _mL__h;
  // Blood flux through tumor per gram of tumor
  Q_T_g = 2.06 _mL__h__g;
  // Coefficient of drug elimination in liver
  kel_L_D = 4.75 __h;
  // Blood in organ to whole kidneys volume ratio
  bto_K = 0.0858 _dimensionless;
  // Blood in organ to whole liver volume ratio
  bto_L = 0.141 _dimensionless;
  // Blood in organ to whole spleen volume ratio
  bto_S = 0.153 _dimensionless;
  // Blood in organ to whole tumor volume ratio
  bto_T = 0.00996 _dimensionless;
  // Blood in organ to whole lungs volume ratio
  bto_U = 0.223 _dimensionless;
  hemato = 0.45 _dimensionless;
  // Equilibrium partition coefficient (blood cells vs plasma) for drug, drug-type dependent.
  Kp_BC_D = 3.9 _dimensionless;
  // Partition coefficient for drug in spleen
  Kp_S_D = 64.8 _dimensionless;
  // Partition coefficient for drug in kidneys
  Kp_K_D = 55.6 _dimensionless;
  // Partition coefficient for drug in lungs
  Kp_U_D = 76.4 _dimensionless;
  // Partition coefficient for drug in liver
  Kp_L_D = 42 _dimensionless;
  // Partition coefficient for drug in rest of body
  Kp_R_D = 55.6 _dimensionless;
  // Partition coefficient for drug in tumor
  Kp_T_D = 63.2 _dimensionless;
  // Scaling factor for PS parameters
  b_PS = 1 _dimensionless;
  // Coefficient describing responce action on kidneys
  koef_resp_K = 79.3 _dimensionless;
  // Coefficient describing responce action on liver
  koef_resp_L = 209 _dimensionless;
  // Coefficient describing responce action on rest of body
  koef_resp_R = 246 _dimensionless;
  // "Synthesis" of indirect response coefficient
  syn_resp = 1 __ug_mL__h;
  // "Degradation" of indirect response coefficient
  deg_resp = 2.46 __h;
  // Constant equal to zero to pass units checking for reactions.
  zero_rate = 0 _ug__h;
  // selected based on experimental conditions, per body weight
  dose_NP_ug_g = 30 _ug__g;
  // Equilibrium partition coefficient (blood cells vs plasma) for nanoparticles, fixed.
  Kp_BC_NP = 0 _dimensionless;
  // Partition coefficient for nanoparticles in liver
  Kp_L_NP = 1000 _dimensionless;
  // Partition coefficient for nanoparticles in spleen
  Kp_S_NP = 1000 _dimensionless;
  // Partition coefficient for nanoparticles in tumor
  Kp_T_NP = 1000 _dimensionless;
  // Partition coefficient for nanoparticles in kidneys
  Kp_K_NP = 1000 _dimensionless;
  // Partition coefficient for nanoparticles in lungs
  Kp_U_NP = 1000 _dimensionless;
  // Partition coefficient for nanoparticles in rest of body
  Kp_R_NP = 1000 _dimensionless;
  // Minimal time value to use expressions like pow(t + timezero, -gamma, see "vrel".
  timezero = 1e-12 _h;
  // Constant that was included to plot in log scale only
  conczero = 1e-9 _ug__mL;

  // Assignment rules:
  rho_avg := 1;
  V_B := W_animal/rho_avg*(w_B + w_L*bto_L + w_S*bto_S + w_K*bto_K + w_U*bto_U) + W_T/rho_avg*bto_T;
  V_L := W_animal/rho_avg*w_L*(1 - bto_L);
  V_S := W_animal/rho_avg*w_S*(1 - bto_S);
  V_T := W_T/rho_avg*(1 - bto_T);
  V_K := W_animal/rho_avg*w_K*(1 - bto_K);
  V_U := W_animal/rho_avg*w_U*(1 - bto_U);
  V_R := W_animal/rho_avg*w_R;
  V_P := V_B*(1 - hemato);
  dose_D_ug := delta*dose_D_ug_g*W_animal/V_B;
  D_P := D_B/(hemato*Kp_BC_D + 1 - hemato);
  PS_L := PS_L_061*(w_L*W_animal/w_L_061/W_animal_061)^b_PS*exp(-koef_resp_L*response);
  PS_S := PS_S_061*(w_S*W_animal/w_S_061/W_animal_061)^b_PS;
  PS_T := PS_T_061*(W_T/W_T_061)^b_PS;
  PS_K := PS_K_061*(w_K*W_animal/w_K_061/W_animal_061)^b_PS*exp(-koef_resp_K*response);
  PS_U := PS_U_061*(w_U*W_animal/w_U_061/W_animal_061)^b_PS;
  PS_R := PS_R_061*(w_R*W_animal/w_R_061/W_animal_061)^b_PS*exp(-koef_resp_R*response);
  w_R := 1 - w_L - w_S - w_K - w_U - w_B - W_T/W_animal;
  w_R_061 := 1 - w_L_061 - w_S_061 - w_K_061 - w_U_061 - w_B_061 - W_T_061/W_animal_061;
  Q_T := Q_T_g*W_T;
  v_ir := syn_resp*D_P - deg_resp*response;
  dose_NP_ug := dose_NP_ug_g*W_animal/V_B;
  NP_P := NP_B/(hemato*Kp_BC_NP + 1 - hemato);
  v := exp(-kdiff/(1 - gamma)*(time + timezero)^(1 - gamma));
  vrel := kdiff*(time + timezero)^(-gamma)*v*(1 - delta);
  D_all_in_NP := (1 - delta)*v;
  NP_L_aver := (NP_L*V_L + NP_B*W_animal/rho_avg*w_L*bto_L)/(W_animal/rho_avg*w_L);
  NP_S_aver := (NP_S*V_S + NP_B*W_animal/rho_avg*w_S*bto_S)/(W_animal/rho_avg*w_S);
  NP_T_aver := (NP_T*V_T + NP_B*W_T/rho_avg*bto_T)/(W_T/rho_avg);
  NP_K_aver := (NP_K*V_K + NP_B*W_animal/rho_avg*w_K*bto_K)/(W_animal/rho_avg*w_K);
  NP_U_aver := (NP_U*V_U + NP_B*W_animal/rho_avg*w_U*bto_U)/(W_animal/rho_avg*w_U);
  NP_L_log := ln(NP_L_aver + conczero);
  NP_S_log := ln(NP_S_aver + conczero);
  NP_T_log := ln(NP_T_aver + conczero);
  NP_K_log := ln(NP_K_aver + conczero);
  NP_U_log := ln(NP_U_aver + conczero);
  NP_P_log := ln(NP_P + conczero);
  NP_L_cap := NP_B*W_animal*w_L*bto_L/(W_animal*w_L);
  NP_S_cap := NP_B*W_animal*w_S*bto_S/(W_animal*w_S);
  NP_T_cap := NP_B*W_T*bto_T/W_T;
  NP_K_cap := NP_B*W_animal*w_K*bto_K/(W_animal*w_K);
  NP_U_cap := NP_B*W_animal*w_U*bto_U/(W_animal*w_U);
  NP_L_tissue := NP_L*V_L/(W_animal/rho_avg*w_L);
  NP_S_tissue := NP_S*V_S/(W_animal/rho_avg*w_S);
  NP_T_tissue := NP_T*V_T/(W_T/rho_avg);
  NP_K_tissue := NP_K*V_K/(W_animal/rho_avg*w_K);
  NP_U_tissue := NP_U*V_U/(W_animal/rho_avg*w_U);
  D_L_free := (D_L*V_L + D_B*W_animal/rho_avg*w_L*bto_L)/(V_L + W_animal/rho_avg*w_L*bto_L);
  D_S_free := (D_S*V_S + D_B*W_animal/rho_avg*w_S*bto_S)/(V_S + W_animal/rho_avg*w_S*bto_S);
  D_T_free := (D_T*V_T + D_B*W_T/rho_avg*bto_T)/(V_T + W_T/rho_avg*bto_T);
  D_K_free := (D_K*V_K + D_B*W_animal/rho_avg*w_K*bto_K)/(V_K + W_animal/rho_avg*w_K*bto_K);
  D_U_free := (D_U*V_U + D_B*W_animal/rho_avg*w_U*bto_U)/(V_U + W_animal/rho_avg*w_U*bto_U);
  D_L_aver0 := NP_L_aver*D_all_in_NP*dose_D_ug_g/dose_NP_ug_g;
  D_S_aver0 := NP_S_aver*D_all_in_NP*dose_D_ug_g/dose_NP_ug_g;
  D_T_aver0 := NP_T_aver*D_all_in_NP*dose_D_ug_g/dose_NP_ug_g;
  D_K_aver0 := NP_K_aver*D_all_in_NP*dose_D_ug_g/dose_NP_ug_g;
  D_U_aver0 := NP_U_aver*D_all_in_NP*dose_D_ug_g/dose_NP_ug_g;
  D_P_aver0 := NP_P*D_all_in_NP*dose_D_ug_g/dose_NP_ug_g;
  D_L_aver := D_L_aver0 + D_L_free;
  D_S_aver := D_S_aver0 + D_S_free;
  D_T_aver := D_T_aver0 + D_T_free;
  D_K_aver := D_K_aver0 + D_K_free;
  D_U_aver := D_U_aver0 + D_U_free;
  D_P_aver := D_P_aver0 + D_P;
  D_L_log := ln(D_L_aver + conczero);
  D_S_log := ln(D_S_aver + conczero);
  D_T_log := ln(D_T_aver + conczero);
  D_K_log := ln(D_K_aver + conczero);
  D_U_log := ln(D_U_aver + conczero);
  D_P_log := ln(D_P_aver + conczero);
  D_P_log_free := ln(D_P + conczero);

  // Rate rules:
  response' = 1*v_ir;

  // Reactions:
  vdist_D_L: D_B -> D_L; (Q_L - Q_S)*D_B - Q_L*D_L/Kp_L_D*(hemato*Kp_BC_D + 1 - hemato);
  vdist_D_S: D_B => D_S; Q_S*D_B;
  vdist_D_SL: D_S => D_L; Q_S*D_S/Kp_S_D*(hemato*Kp_BC_D + 1 - hemato);
  vdist_D_T: D_B -> D_T; Q_T*(D_B - D_T/Kp_T_D*(hemato*Kp_BC_D + 1 - hemato));
  vdist_D_K: D_B -> D_K; Q_K*(D_B - D_K/Kp_K_D*(hemato*Kp_BC_D + 1 - hemato));
  vdist_D_U: D_B -> D_U; Q_U*(D_B - D_U/Kp_U_D*(hemato*Kp_BC_D + 1 - hemato));
  vdist_D_R: D_B -> D_R; Q_R*(D_B - D_R/Kp_R_D*(hemato*Kp_BC_D + 1 - hemato));
  vcl_D_L: D_L => ; V_L*kel_L_D*D_L;
  vcl_D_S: D_S => ; zero_rate;
  vcl_D_T: D_T => ; zero_rate;
  vcl_D_K: D_K => ; zero_rate;
  vcl_D_U: D_U => ; zero_rate;
  vcl_D_R: D_R => ; zero_rate;
  vcl_D_B: D_B => ; zero_rate;
  vdist_NP_L: NP_B -> NP_L; PS_L*(NP_P - NP_L/Kp_L_NP);
  vdist_NP_S: NP_B -> NP_S; PS_S*(NP_P - NP_S/Kp_S_NP);
  vdist_NP_T: NP_B -> NP_T; PS_T*(NP_P - NP_T/Kp_T_NP);
  vdist_NP_K: NP_B -> NP_K; PS_K*(NP_P - NP_K/Kp_K_NP);
  vdist_NP_U: NP_B -> NP_U; PS_U*(NP_P - NP_U/Kp_U_NP);
  vdist_NP_R: NP_B -> NP_R; PS_R*(NP_P - NP_R/Kp_R_NP);
  vcl_NP_L: NP_L => ; zero_rate;
  vcl_NP_S: NP_S => ; zero_rate;
  vcl_NP_T: NP_T => ; zero_rate;
  vcl_NP_K: NP_K => ; zero_rate;
  vcl_NP_U: NP_U => ; zero_rate;
  vcl_NP_R: NP_R => ; zero_rate;
  vcl_NP_B: NP_B => ; zero_rate;
  vrel_L: => D_L; V_L*NP_L*vrel*dose_D_ug_g/dose_NP_ug_g;
  vrel_S: => D_S; V_S*NP_S*vrel*dose_D_ug_g/dose_NP_ug_g;
  vrel_T: => D_T; V_T*NP_T*vrel*dose_D_ug_g/dose_NP_ug_g;
  vrel_K: => D_K; V_K*NP_K*vrel*dose_D_ug_g/dose_NP_ug_g;
  vrel_U: => D_U; V_U*NP_U*vrel*dose_D_ug_g/dose_NP_ug_g;
  vrel_R: => D_R; V_R*NP_R*vrel*dose_D_ug_g/dose_NP_ug_g;
  vrel_B: => D_B; V_B*NP_B*vrel*dose_D_ug_g/dose_NP_ug_g;

  // Events:
  single_dose_sw: at (true && (time >= 0)): D_B = dose_D_ug, NP_B = dose_NP_ug;

  // Unit definitions:
  unit _h = 3600 second;
  unit __mL_g = 1e-3 kilogram / (1e-3 litre); __mL_g is "g/mL";
  unit _mL = 1e-3 litre;
  unit _ug = 1e-9 kilogram;
  unit _dimensionless = dimensionless;
  unit _ug__mL = 1e-9 kilogram / (1e-3 litre); _ug__mL is "ug/mL";
  unit _mL__h = 1e-3 litre / (3600 second); _mL__h is "mL/h";
  unit _ug__h = 1e-9 kilogram / (3600 second); _ug__h is "ug/h";
  unit __h = 1 / (3600 second); __h is "1/h";
  unit _g = 1e-3 kilogram;
  unit _kdiffUnits = 1 / (3600 second)^0.43;
  unit _ug__g = 1e-6 dimensionless; _ug__g is "ug/g";
  unit _mL__h__g = 1e-3 litre / (3600 second * 1e-3 kilogram); _mL__h__g is "mL/h/g";
  unit __ug_mL__h = 1e-3 litre / (1e-9 kilogram * 3600 second); __ug_mL__h is "mL/ug/h";
end
